OpenVSP model (file version 5), 6 components.
Geometry view with OpenVSP parameter names; values to 6 digits, angles in degrees, lengths in the model's unit.
Overall bounding box: X_Min=-0.00573837 X_Len=7.71504 Y_Min=-12.5759 Y_Len=25.1517 Z_Min=-0.0203832 Z_Len=0.962862

Wing "Fixed 1"
  location (X Y Z) 0 0 0.3, rotation 0 2 0
  symmetric about XZ
  bounding box size 4.26967 3.03064 0.660763
  totals: TotalSpan=3.02069 TotalProjectedSpan=3.01758 TotalChord=3.64905 TotalArea=11.0227 TotalAR=0.826097 MAC=3.65075
  root: chord 3.78532, twist 0, airfoil file ""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 BaseThickChord=0.12037 ThickChord=0.12037
  sections:
    n  Span     Root_Chord  Tip_Chord  Area     Sweep    Sweep_Location  Dihedral  Twist     Twist_Location  tip airfoil
    1  1.51034  3.78532     3.51278    5.51133  24.0225  0.25            2.6       -0.10343  0.25            as above

Wing "LE flap"
  location (X Y Z) 0.743234 1.50879 0.342601, rotation 0 2 0
  symmetric about XZ
  bounding box size 5.47793 23.8947 0.916871
  totals: TotalSpan=20.8931 TotalProjectedSpan=20.8716 TotalChord=2.57024 TotalArea=53.7002 TotalAR=8.11214 MAC=0.541702
  root: chord 3.51278, twist -0.10343, airfoil file ""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 BaseThickChord=0.12037 ThickChord=0.12037
  sections:
    n  Span     Root_Chord  Tip_Chord  Area     Sweep    Sweep_Location  Dihedral  Twist     Twist_Location  tip airfoil
    1  10.4465  3.51278     1.62769    26.8501  24.0225  0.25            2.6       -1.76747  0.25            as above

Wing "Fowler"
  location (X Y Z) 0.743234 1.50879 0.342601, rotation 0 2 0
  symmetric about XZ
  bounding box size 3.53671 18.8649 0.700495
  totals: TotalSpan=15.8586 TotalProjectedSpan=15.8423 TotalChord=2.79735 TotalArea=44.3622 TotalAR=5.65748 MAC=0.860407
  root: chord 3.51278, twist -0.10343, airfoil file ""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 BaseThickChord=0.12037 ThickChord=0.12037
  sections:
    n  Span     Root_Chord  Tip_Chord  Area     Sweep    Sweep_Location  Dihedral  Twist     Twist_Location  tip airfoil
    1  7.92931  3.51278     2.08193    22.1811  24.0225  0.25            2.6       -1.09092  0.25            as above

Wing "Fixed 2"
  location (X Y Z) 0.743234 1.50879 0.342601, rotation 0 2 0
  symmetric about XZ
  bounding box size 5.64164 23.8947 0.948763
  totals: TotalSpan=20.8931 TotalProjectedSpan=20.8716 TotalChord=2.57024 TotalArea=53.7002 TotalAR=8.11214 MAC=1.37313
  root: chord 3.51278, twist -0.10343, airfoil file ""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 BaseThickChord=0.12037 ThickChord=0.12037
  sections:
    n  Span     Root_Chord  Tip_Chord  Area     Sweep    Sweep_Location  Dihedral  Twist     Twist_Location  tip airfoil
    1  10.4465  3.51278     1.62769    26.8501  24.0225  0.25            2.6       -1.76747  0.25            as above

Wing "Aileron"
  location (X Y Z) 4.64521 9.42993 0.566257, rotation 0 2 0
  symmetric about XZ
  bounding box size 1.61344 25.1492 0.335733
  totals: TotalSpan=6.2931 TotalProjectedSpan=6.28662 TotalChord=1.79803 TotalArea=11.3152 TotalAR=3.4928 MAC=0.545734
  root: chord 2.08193, twist -1.09092, airfoil file ""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 BaseThickChord=0.12037 ThickChord=0.12037
  sections:
    n  Span     Root_Chord  Tip_Chord  Area     Sweep    Sweep_Location  Dihedral  Twist  Twist_Location  tip airfoil
    1  3.14655  2.08193     1.51413    5.65759  24.0225  0.25            2.6       -2     0.25            as above

Wing "Fixed 3"
  location (X Y Z) 5.88394 11.9446 0.637259, rotation 0 2 0
  symmetric about XZ
  bounding box size 1.37886 25.1517 0.263458
  totals: TotalSpan=1.25862 TotalProjectedSpan=1.25732 TotalChord=1.57091 TotalArea=1.97718 TotalAR=0.799556 MAC=1.10298
  root: chord 1.62769, twist -1.76747, airfoil file ""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 BaseThickChord=0.12037 ThickChord=0.12037
  sections:
    n  Span     Root_Chord  Tip_Chord  Area      Sweep    Sweep_Location  Dihedral  Twist  Twist_Location  tip airfoil
    1  0.62931  1.62769     1.51413    0.988589  24.0225  0.25            2.6       -2     0.25            as above
