OpenVSP model (file version 5), 12 components.
Geometry view with OpenVSP parameter names; values to 6 digits, angles in degrees, lengths in the model's unit.
Overall bounding box: X_Min=0 X_Len=29.0231 Y_Min=-12.5816 Y_Len=25.1631 Z_Min=-3.205 Z_Len=8.36731

Fuselage "Fuselage"
  location (X Y Z) 0 0 0, rotation 0 0 0
  bounding box size 28.6813 3.01 3.01
  Design: Length=28.6813
  cross sections:
    n   XLocPercent  YLocPercent  ZLocPercent   shape
    0   0            0            -0.0139464    point
    1   0.00234479   0            -0.0112256    circle Circle_Diameter=0.587222
    2   0.00928905   0            -0.00860934   circle Circle_Diameter=1.15188
    3   0.0205659    0            -0.00619819   circle Circle_Diameter=1.67227
    4   0.035742     0            -0.0040848    circle Circle_Diameter=2.12839
    5   0.0542342    0            -0.00235039   circle Circle_Diameter=2.50272
    6   0.0753317    0            -0.00106161   circle Circle_Diameter=2.78088
    7   0.0982239    0            -0.000267976  circle Circle_Diameter=2.95216
    8   0.122031     0            0             circle Circle_Diameter=3.01
    9   0.632687     0            0             as above
    10  0.693906     0            0.000892659   circle Circle_Diameter=2.92639
    11  0.755125     0            0.00357064    circle Circle_Diameter=2.67556
    12  0.816343     0            0.00803393    circle Circle_Diameter=2.2575
    13  0.877562     0            0.0142825     circle Circle_Diameter=1.67222
    14  0.938781     0            0.0223165     circle Circle_Diameter=0.919722
    15  1            0            0.0321357     point

Fuselage "Exhaust plug"
  location (X Y Z) 11.6515 4.4 -1.84205, rotation 0 0 0
  symmetric about XZ
  bounding box size 1.05 9.2928 0.4928
  Design: Length=1.05
  cross sections:
    n  XLocPercent  YLocPercent  ZLocPercent  shape
    0  0            0            0            circle Circle_Diameter=0.4928
    1  0.333333     0            0            as above
    2  0.666667     0            0            circle Circle_Diameter=0.29568
    3  1            0            0            point

Wing "Wing"
  location (X Y Z) 8.2 0 -1.1, rotation 0 2 0
  symmetric about XZ
  bounding box size 9.36991 25.1631 1.0932
  totals: TotalSpan=25.1724 TotalProjectedSpan=25.1571 TotalChord=2.64973 TotalArea=66.7 TotalAR=9.48843 MAC=2.81206
  root: chord 3.78532, twist 0, airfoil file ""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 BaseThickChord=0.119913 ThickChord=0.119913
  sections:
    n  Span     Root_Chord  Tip_Chord  Area   Sweep  Sweep_Location  Dihedral  Twist  Twist_Location  tip airfoil
    1  12.5862  3.78532     1.51413    33.35  30     0.25            2         -2     0.25            as above

Wing "Vertical tail"
  location (X Y Z) 23.456 0 0.32303, rotation 90 0 0
  bounding box size 5.5671 0.445192 4.83928
  totals: TotalSpan=4.83928 TotalProjectedSpan=4.83928 TotalChord=2.68849 TotalArea=13.0103 TotalAR=1.8 MAC=2.81742
  root: chord 3.70826, twist 0, NACA 4-series Camber=0 CamberLoc=0.2 ThickChord=0.12
  sections:
    n  Span     Root_Chord  Tip_Chord  Area     Sweep  Sweep_Location  Dihedral  Twist  Twist_Location  tip airfoil
    1  4.83928  3.70826     1.66872    13.0103  35     0.25            0         0      0.25            as above

Wing "Horizontal tail"
  location (X Y Z) 24.2835 0 2.74267, rotation 0 0 0
  symmetric about XZ
  bounding box size 3.65539 7.44083 0.308036
  totals: TotalSpan=7.44083 TotalProjectedSpan=7.44083 TotalChord=1.86021 TotalArea=13.8415 TotalAR=4 MAC=1.94942
  root: chord 2.5658, twist 0, NACA 4-series Camber=0 CamberLoc=0.2 ThickChord=0.12
  sections:
    n  Span     Root_Chord  Tip_Chord  Area     Sweep  Sweep_Location  Dihedral  Twist  Twist_Location  tip airfoil
    1  3.72041  2.5658      1.15461    6.92074  30     0.25            0         0      0.25            as above

Wing "Pylon"
  location (X Y Z) 8.74471 4.4 -1.33832, rotation 90 0 0
  symmetric about XZ
  bounding box size 3.21006 9.02825 0.360365
  totals: TotalSpan=0.720729 TotalProjectedSpan=0.720729 TotalChord=2.8497 TotalArea=2.05386 TotalAR=0.252914 MAC=2.8497
  root: chord 2.8497, twist 0, NACA 4-series Camber=0 CamberLoc=0.2 ThickChord=0.08
  sections:
    n  Span      Root_Chord  Tip_Chord  Area     Sweep  Sweep_Location  Dihedral  Twist  Twist_Location  tip airfoil
    1  0.360365  2.8497      2.8497     1.02693  45     0               0         0      0.25            as above

BodyOfRevolution "Nacelle"
  location (X Y Z) 7.93051 4.4 -1.84205, rotation 0 0 0
  symmetric about XZ
  bounding box size 4.07135 10.1445 1.34448
  Design: A0=0.898866 Ae=0.602696 Amin=0.57549 AminW=0.001 Angle=1.36353 Diameter=1.0698 Mode=0
  profile: airfoil file ""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 BaseThickChord=0.0491558 Chord=4.07215 ThickChord=0.0491558

Ellipsoid "Fan face"
  location (X Y Z) 8.41903 4.4 -1.84205, rotation 0 0 0
  symmetric about XZ
  bounding box size 0.04 9.78126 0.98126
  Design: A_Radius=0.02 B_Radius=0.49063 C_Radius=0.49063

Ellipsoid "Spinner"
  location (X Y Z) 8.41903 4.4 -1.84205, rotation 0 0 0
  symmetric about XZ
  bounding box size 0.6 9.0006 0.2006
  Design: A_Radius=0.3 B_Radius=0.1003 C_Radius=0.1003

Fuselage "Nose gear strut"
  location (X Y Z) 5.57 0 -2.9256, rotation 0 -90 0
  bounding box size 0.12 0.12 1.5406
  Design: Length=1.5406
  cross sections:
    n  XLocPercent  YLocPercent  ZLocPercent  shape
    0  0            0            0            point
    1  0.0389459    0            0            circle Circle_Diameter=0.12
    2  0.961054     0            0            as above
    3  1            0            0            point

Fuselage "Main gear strut"
  location (X Y Z) 13.2 2.77 -2.697, rotation -180 -57.8788 -180
  symmetric about XZ
  bounding box size 1.14449 5.74 1.65952
  Design: Length=1.8339
  cross sections:
    n  XLocPercent  YLocPercent  ZLocPercent  shape
    0  0            0            0            point
    1  0.0545285    0            0            circle Circle_Diameter=0.2
    2  0.945471     0            0            as above
    3  1            0            0            point

Gear "Tires"
  location (X Y Z) 0 0 -3.205, rotation 0 0 0
  bounding box size 13.708 6.5266 1.016
  Gear: GearConfigMode=0
  bogie "Default": NumAcross=2 NumTandem=1 Spacing=0.29605 Pitch=0.61468 Symmetrical=0 XContactPt=5.57 YContactPt=0 TravelCompressed=1 TravelExtended=1 SteeringAngle=0 DiameterModel=0.5588 WidthModel=0.14605 PlyRating=20
  bogie "Default": NumAcross=2 NumTandem=1 Spacing=0.6183 Pitch=1.1176 Symmetrical=1 XContactPt=13.2 YContactPt=2.77 TravelCompressed=1 TravelExtended=1 SteeringAngle=0 DiameterModel=1.016 WidthModel=0.3683 PlyRating=20
